// SBML level 3 version 1

model model__control_events_petab_problem()
  // model

  // Compartments:
  compartment Compartment = 1;

  // Species:
  species substrate in Compartment = substrate0;

  // Parameters:
  substrate0 = 0;
  decay = 0;
  influx = 0;
  control_parameter__target__influx__time__15_0__value__0_1 = 0.1;
  switch_parameter__target__influx__time__15_0__value__0_1 = 0;
  control_parameter__target__influx__time__35_0__value__estimate = 0.1;
  switch_parameter__target__influx__time__35_0__value__estimate = 0;
  control_parameter__target__influx__time__55_0__value__estimate = 0.1;
  switch_parameter__target__influx__time__55_0__value__estimate = 0;
  control_parameter__target__influx__time__65_0__value__estimate = 0.1;
  switch_parameter__target__influx__time__65_0__value__estimate = 0;
  control_parameter__target__influx__time__85_0__value__estimate = 0.1;
  switch_parameter__target__influx__time__85_0__value__estimate = 0;
  control_parameter__target__influx__time__75_0__value__5_0 = 5;
  switch_parameter__target__influx__time__75_0__value__5_0 = 0;
  control_parameter__target__influx__time__95_0__value__estimate = 0.1;
  switch_parameter__target__influx__time__95_0__value__estimate = 0;

  // Assignment rules:
  t := time;

  // Rate rules:
  substrate' = -1*decay*substrate + influx;

  // Events:
  control_event__target__influx__time__15_0__value__0_1: at (time >= 30): influx = 0.1;
  control_event__target__influx__time__35_0__value__estimate: at (time >= 50): influx = control_parameter__target__influx__time__35_0__value__estimate;
  control_event__target__influx__time__55_0__value__estimate: at (time >= 70): influx = control_parameter__target__influx__time__55_0__value__estimate;
  control_event__target__influx__time__65_0__value__estimate: at (time >= 80): influx = control_parameter__target__influx__time__65_0__value__estimate;
  control_event__target__influx__time__85_0__value__estimate: at (time >= 100): influx = control_parameter__target__influx__time__85_0__value__estimate;
  control_event__target__influx__time__75_0__value__5_0: at (time >= 90): influx = 5;
  control_event__target__influx__time__95_0__value__estimate: at (time >= 110): influx = control_parameter__target__influx__time__95_0__value__estimate;
end
